*MATERIAL, NAME=STEEL
*ELASTIC
2.100e+11, 0.300
*DENSITY
7.850e+03
**
**
*PART, NAME=BEAM
**
*NODE, NSET=COL1
1001,0.00000,0.00000,0.00000
1002,0.50000,0.00000,0.00000
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**
**
*ELEMENT, TYPE=B31, ELSET=COL1
1001, 1001, 1002
1002, 1002, 1003
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**
**
*NSET, NSET=SUPPORT
1001, 1081
**
*NSET, NSET=ALL
1001, 1002, 1003, 1004, 1005, 1006
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**
*ELEMENT, TYPE=SPRING1, ELSET=SPRING_TO_GROUND
3000, 1030
*SPRING, ELSET=SPRING_TO_GROUND
2
1e7
*BEAM SECTION, ELSET=COL1, MATERIAL=STEEL, TEMPERATURE=GRADIENTS, SECTION=BOX
1.00000e-01, 1.00000e-01, 1.00000e-02, 1.00000e-02, 1.00000e-02, 1.00000e-02
0.00000, 1.00000, 0.00000
**
*END PART
**
*ASSEMBLY, NAME=ASSEMBLY_BEAM
**
*INSTANCE, NAME=BEAM, PART=BEAM
**
*END INSTANCE
**
*END ASSEMBLY
**
*BOUNDARY, OP=MOD
BEAM.SUPPORT,1,4,0
**
*BOUNDARY, OP=MOD
BEAM.ALL,3,3,0
**
*BOUNDARY, OP=MOD
BEAM.ALL,4,4,0
**
***********************************************************
** Modal
***********************************************************
**********
**
**********
*STEP
*FREQUENCY, NORMALIZATION=MASS
20
**
**
*OUTPUT, FIELD
*NODE OUTPUT
U
COORD
**
*OUTPUT, FIELD
*ELEMENT OUTPUT
SF
**
*END STEP
**
